// COMSOL Multiphysics 4.4.0.248 model "spiral_optimization_template_06Mar15.mph"
// Outline of the model tree

Parameters
  L = 0.1[m]
  D = 0.036 [m]
  d = 0.025 [m]
  a1 = d/2[m]
  b1 = 0.25
  a2 = a1*1
  a3 = a1*1
  a4 = a1*1
  a5 = a1*1
  a6 = a1*1
  b2 = -log(a1*exp(-b1*(pi/2*1))/a2)/(pi/2*1)
  b3 = -log(a2*exp(-b2*(pi/2*2))/a3)/(pi/2*2)
  b4 = -log(a3*exp(-b3*(pi/2*3))/a4)/(pi/2*3)
  b5 = -log(a4*exp(-b4*(pi/2*4))/a5)/(pi/2*4)
  b6 = -log(a5*exp(-b5*(pi/2*5))/a6)/(pi/2*5)

Variables
  var1 "Variables 1a"
    p_i = exp(-1i*acpr.k*x)[Pa]
    s11 = intop1(acpr.p_t-p_i)/intop1(p_i)
    s11p = s11*exp(i*acpr.k*(L-D))
    s21 = intop2(acpr.p_t)/intop1(p_i)
    s21p = s21*exp(i*acpr.k*(L-D))

Couplings
  intop1: Integration "Integration 1a" on boundaries 1
  intop2: Integration "Integration 2a" on boundaries 10

Geometry
  geom1 "Geometry 1" (2D, length unit m)
    b1: BezierPolygon "Bézier Polygon 1" | p = {{-D/2, D/2}, {d/2, d/2}}; degree = 1; w = {1, 1}
    b2: BezierPolygon "Bézier Polygon 2"
      p = {{D/2, a1*exp(-b1*pi/2)*sin(pi/2)}, {d/2, a1*exp(-b1*pi/2)*cos(pi/2)}}
      degree = 1
      w = {1, 1}
    pc1: ParametricCurve
      parname = theta
      parmin = 0*pi/180
      parmax = 90*pi/180
      coord = {a1*exp(-b1*theta)*sin(theta), a1*exp(-b1*theta)*cos(theta)}
    pc2: ParametricCurve
      parname = theta
      parmin = 90*pi/180
      parmax = 180*pi/180
      coord = {a2*exp(-b2*theta)*sin(theta), a2*exp(-b2*theta)*cos(theta)}
    pc3: ParametricCurve
      parname = theta
      parmin = 180*pi/180
      parmax = 270*pi/180
      coord = {a3*exp(-b3*theta)*sin(theta), a3*exp(-b3*theta)*cos(theta)}
    pc4: ParametricCurve
      parname = theta
      parmin = 270*pi/180
      parmax = 360*pi/180
      coord = {a4*exp(-b4*theta)*sin(theta), a4*exp(-b4*theta)*cos(theta)}
    pc5: ParametricCurve
      parname = theta
      parmin = 360*pi/180
      parmax = 450*pi/180
      coord = {a5*exp(-b5*theta)*sin(theta), a5*exp(-b5*theta)*cos(theta)}
    pc6: ParametricCurve
      parname = theta
      parmin = 450*pi/180
      parmax = 540*pi/180
      coord = {a6*exp(-b6*theta)*sin(theta), a6*exp(-b6*theta)*cos(theta)}
    rot1: Rotate | input = b1, b2, pc1, pc2, pc3, pc4, pc5, pc6; keep = on; rot = 180
    r2: Rectangle | pos = {0, 0}; base = center; size = {L, d+1e-3}
    fin: Finalize "Form Union"

Materials
  mat1 "Air" on all domains
    def "Basic"
      density = 1.25*(1-0.005*i)
      soundspeed = 343/(1-0.005*i)

Physics
  acpr: PressureAcoustics "Pressure Acoustics, Frequency Domain" on all domains
    dependent variable p
    fpam1: FrequencyPressureAcousticsModel "Pressure Acoustics 1" (default)
    shb1: SoundHard "Sound Hard Boundary (Wall) 1" (default)
    init1: init "Initial Values 1" (default)
    pc1: PeriodicCondition on boundaries 2, 3
      dd1: DestinationDomains "Destination Selection 1" on selection acpr_dst_pc1
    pwr1: PlaneWaveRadiation on boundaries 1, 10
      ipf1: IncidentPressureField on boundaries 1 | pamp = 1
    ishb1: InteriorSoundHard "Interior Sound Hard Boundary (Wall) 1" on all boundaries

Mesh
  mesh1 "Mesh 1" (physics-controlled)
    size: MeshSizeDefault | hauto = 1

Studies
  std2 "Study 2"
    freq: Frequency "Frequency Domain" | plist = 3000; preusesol = yes

Solver configurations
  sol1 "Solver 1" (study std2)
    v1: Variables "Dependent Variables 1"
    s1: Stationary "Stationary Solver 1"
      dDef: Direct
      p1: Parametric | pname = freq; plistarr = 3000; pcontinuationmode = no
      fc1: FullyCoupled

Datasets
  dset1: Solution | solution = sol1

Derived values
  pev1: EvalPoint "Transmission_abs" on points 2 | data = dset1; table = tbl4; expr = abs(s21p); unit = rad
  pev2: EvalPoint "Transmission_angle" on points 2 | data = dset1; table = tbl5; expr = 360-arg(s21p)*180/pi; unit = rad

Tables
  tbl2: Table
    // Phase_change (-arg(s11p)*180/pi)
    freq | -arg(s11p)*180/pi (rad), Point: 2
    3000 | 25.7937
  tbl4: Table
    // Transmission_abs (abs(s21p))
    freq | abs(s21p) (rad), Point: 2 | abs(s21p) (rad), Point: 2 | abs(s21p) (rad), Point: 2 | abs(s21p) (rad), Point: 2 | abs(s21p) (rad), Point: 2
    3000 | 0.924143 | 0.938567 | 0.511434 | 0.924143 | 0.938567
  tbl5: Table
    // Transmission_angle (360-arg(s21p)*180/pi)
    freq | 360-arg(s21p)*180/pi (rad), Point: 2 | 360-arg(s21p)*180/pi (rad), Point: 2 | 360-arg(s21p)*180/pi (rad), Point: 2
    3000 | 361.004 | 296.384 | 261.405

Plots
  pg2: PlotGroup2D "Acoustic Pressure (acsl)" | data = dset1
    surf1: Surface | expr = acpr.p_t